// SBML level 2 version 3

model Tyson1991CellModel_6()
  // Tyson1991_CellCycle_6var
  // Cell Cycle Model; Tyson (1991, 6 variables)
  // Description
  // A model of the cell cycle based on the interactions between cdc2 and cyclin. The model has six dynamic variables: C2 (cdc2); CP (cdc2-P complex); pM (P-cyclin-cdc2-P complex); M (active MPF, P-cyclin-cdc2 complex); Y (cyclin); and YP (cyclin-P). Total cyclin concentration (YT) is the sum [YT]=[Y]+[YP]+[pM]+[M]
  // Reaction
  // Variable ODE
  // C2 0
  // CP 1
  // pM 0.3
  // M 0
  // Y 0
  // YP 0
  // Generated by Cellerator Version 1.0 update 2.1125 using Mathematica 4.2 for Mac OS X (June 4, 2002), November 27, 2002 12:12:10, using (PowerMac,PowerPC, Mac OS X,MacOSX,Darwin)
  // author=B.E.Shapiro
  // This model originates from BioModels Database: A Database of Annotated Published Models. It is copyright (c) 2005-2008 The BioModels Team.
  // For more information see the terms of use.
  // To cite BioModels Database, please use Le Novère N., Bornstein B., Broicher A., Courtot M., Donizelli M., Dharuri H., Li L., Sauro H., Schilstra M., Shapiro B., Snoep J.L., Hucka M. (2006) BioModels Database: A Free, Centralized Database of Curated, Published, Quantitative Kinetic Models of Biochemical and Cellular Systems Nucleic Acids Res., 34: D689-D691.
  // biomodels.db:BIOMD0000000005
  // isDescribedBy pubmed:1831270
  // hasVersion reactome:REACT_152
  // isVersionOf kegg.pathway:sce04111 GO:0000278
  // taxonomy:33154

  // Compartments:
  compartment cell = 1;  // GO:0005623

  // Species:
  species $EmptySet in cell = 0;
  species cdc2k in cell = 0;  // isVersionOf uniprot:P04551
  species CP in cell = 0.75/cell; CP is "cdc2k-P";  // isVersionOf uniprot:P04551
  species M in cell = 0; M is "p-cyclin_cdc2";  // hasPart uniprot:P04551 interpro:IPR006670
  species pM in cell = 0.25/cell; pM is "p-cyclin_cdc2-p";  // hasPart uniprot:P04551 interpro:IPR006670
  species Y in cell = 0; Y is "cyclin";  // isVersionOf interpro:IPR006670
  species YP in cell = 0; YP is "p-cyclin";  // isVersionOf interpro:IPR006670
  species $YT in cell; YT is "total_cyclin";  // isVersionOf interpro:IPR006670
  species $CT in cell; CT is "total_cdc2";  // isVersionOf uniprot:P04551

  // Assignment rules:
  YT := Y + YP + M + pM;
  CT := cdc2k + CP + M + pM;

  // Reactions:
  cyclin_cdc2k_dissociation: M => cdc2k + YP; cell*k6*M;  // hasVersion reactome:REACT_6308; isVersionOf GO:0000079
    k6 = 1 pmin;
  cdc2k_phosphorylation: cdc2k => CP; cell*cdc2k*k8notP;  // isVersionOf ec-code:2.7.11.1 GO:0006468
    k8notP = 1000000 pmin;
  cdc2k_dephosphorylation: CP => cdc2k; cell*CP*k9;  // isVersionOf ec-code:3.1.3.16 GO:0006470
    k9 = 1000 pmin;
  cyclin_cdc2k_p_association: CP + Y => pM; cell*CP*k3*Y; cyclin_cdc2k_p_association is "cyclin cdc2k-p association";  // hasVersion reactome:REACT_6308 reactome:REACT_6216
    k3 = 200 lpmin;
  deactivation_of_cdc2_kinase: M => pM; cell*k5notP*M;  // hasVersion reactome:REACT_6327 reactome:REACT_3178; isVersionOf ec-code:2.7.10.2 GO:0045736 GO:0006468
    k5notP = 0 pmin;
  cyclin_biosynthesis: $EmptySet => Y; cell*k1aa;  // isVersionOf GO:0043037
    k1aa = 0.015 plitrepmin;
  default_degradation_of_cyclin: Y => $EmptySet; cell*k2*Y;  // isVersionOf GO:0008054
    k2 = 0 pmin;
  Reaction8: YP => $EmptySet; cell*k7*YP; Reaction8 is "cdc2 kinase triggered degration of cyclin";  // isVersionOf GO:0008054
    k7 = 0.6 pmin;
  activation_of_cdc2_kinase: pM => M; cell*pM*(k4prime + k4*(M/CT)^2);  // modifiers: CT; isVersionOf ec-code:3.1.3.16 GO:0045737 GO:0006470; hasVersion reactome:REACT_6294 reactome:REACT_6175 reactome:REACT_6257
    k4 = 180 pmin; k4prime = 0.018 pmin;

  // Unit definitions:
  unit time = 60 second; time is "minutes";
  unit substance = dimensionless; substance is "normalised";
  unit pmin = 1 / (60 second); pmin is "perminute";
  unit lpmin = litre / (60 second); lpmin is "litrepermin";
  unit plitrepmin = 1 / (60 second * litre); plitrepmin is "perlitrepermin";
end
