// SBML level 2 version 4

function Noncompetitive_inhibition__irr(substrate, Inhibitor, Km, V, Ki)
  V*substrate/((Km + substrate)*(1 + Inhibitor/Ki));
end
Noncompetitive_inhibition__irr is "Noncompetitive inhibition (irr)";

model New_Model()

  // Compartments:
  compartment default = 1;

  // Species:
  species A in default = 1;
  species B in default = 0;
  species C in default = 0;
  species D in default = 0;

  // Reactions:
  R: A => 2 B + D; default*Noncompetitive_inhibition__irr(A, C, Km, V, Ki); R is "R1";  // modifiers: C
    Km = 0.025; V = 0.12; Ki = 0.1;
  R2: D => C; default*k1*D;
    k1 = 0.1;

  // Unit definitions:
  unit volume = 1e-3 litre;
  unit substance = 1e-3 mole;
end
